*Heading
** Job name: Job-42 Model name: Model-1-Scale-08-Spline-larger1-triangle-3ptbending-LMSC-8RVE
** Generated by: Abaqus/CAE 2023
*Preprint, echo=NO, model=NO, history=NO, contact=NO
**
** PARTS
**
*Part, name=Part-1
*Node
      1,           0.,           0.
      2, 0.0392800011,           0.
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*Element, type=CPE4R
  1,   1,   2,  28,  27
  2,   2,   3,  29,  28
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*Nset, nset=Set-LMSC-1, generate
   1,  234,    1
*Elset, elset=Set-LMSC-1, generate
   1,  200,    1
** Section: Section-LMSC
*Solid Section, elset=Set-LMSC-1, controls=EC-1, material=MATRIX-LMSC
,
*End Part
**
*Part, name=Part-Roll-bottom-1
*Node
      1, 0.0299999993, -1.92820968e-11
      2, 0.0299999993, 0.0399999991
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*Element, type=CPS3
 1, 19, 18, 13
 2, 20, 10, 19
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*Nset, nset=Set-roll-bottom, generate
  1,  20,   1
*Elset, elset=Set-roll-bottom, generate
  1,  22,   1
** Section: Section-Steel
*Solid Section, elset=Set-roll-bottom, material=Steel
,
*End Part
**
*Part, name=Part-Roll-top-1
*Node
      1, 0.0282842703, -0.0282842703
      2, 0.0282842703,           0.
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*Element, type=CPS3
1,  1,  9, 25
2, 25, 12,  1
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*Nset, nset=Set-Steel-1, generate
  1,  28,   1
*Elset, elset=Set-Steel-1, generate
  1,  38,   1
** Section: Section-Steel
*Solid Section, elset=Set-Steel-1, material=Steel
,
*End Part
**
**
** ASSEMBLY
**
*Assembly, name=Assembly
**
*Instance, name=Part-1-1, part=Part-1
*End Instance
**
*Instance, name=Part-Roll-bottom-1-1, part=Part-Roll-bottom-1
       0.982,        -0.04,           0.
       0.982,        -0.04,           0.,        0.982,        -0.04, 1.00000001268805, 89.9999992730282
*End Instance
**
*Instance, name=Part-Roll-top-1-1, part=Part-Roll-top-1
       0.245,         0.36,           0.
       0.245,         0.36,           0.,        0.245,         0.36, -1.00000001268805, 89.9999992730282
*End Instance
**
*Node
      1,  0.245000005,  0.360000014,           0.
*Nset, nset=Set-5, instance=Part-Roll-bottom-1-1, generate
  1,  20,   1
*Elset, elset=Set-5, instance=Part-Roll-bottom-1-1, generate
  1,  22,   1
*Nset, nset=Set-RP-Encastre-left
 1,
*Nset, nset=Set-XSYM, instance=Part-1-1, generate
  26,  234,   26
*Nset, nset=Set-XSYM, instance=Part-Roll-bottom-1-1
  1,  5,  6, 13, 14, 15
*Elset, elset=Set-XSYM, instance=Part-1-1, generate
  25,  200,   25
*Elset, elset=Set-XSYM, instance=Part-Roll-bottom-1-1
  6,  8, 11, 17, 21
*Elset, elset=_s_Surf-Left_S2, internal, instance=Part-Roll-top-1-1
  2,  6, 17, 18, 20, 23, 27, 28, 29, 32, 35, 36, 37
*Elset, elset=_s_Surf-Left_S1, internal, instance=Part-Roll-top-1-1
 12, 16, 24
*Surface, type=ELEMENT, name=s_Surf-Left
_s_Surf-Left_S2, S2
_s_Surf-Left_S1, S1
** Constraint: Constraint-3
*Coupling, constraint name=Constraint-3, ref node=Set-RP-Encastre-left, surface=s_Surf-Left
*Kinematic
*End Assembly
**
** ELEMENT CONTROLS
**
**Section Controls, name=EC-1, DISTORTION CONTROL=YES, hourglass=ENHANCED
*Section Controls, name=EC-1, DISTORTION CONTROL=YES, ELEMENT DELETION=YES, hourglass=ENHANCED
1., 1., 1.
*Amplitude, name=Amp-1, smooth=0.25
             0.,              0.,              0.000185,              0.16
**
** MATERIALS
**
*Material, name=MATRIX-LMSC
*Density
 1.76e-09,
*DEPVAR, DELETE=15
**Depvar
     15,
1,  INCEPS1,    IncrementSrain 1
2,  INCEPS2,    IncrementSrain 2
3,  INCEPS3,    IncrementSrain 3
4,  MEM1,    LMSC  memory state 1
5,  MEM2,    LMSC  memory state 2
6,  MEM3,    LMSC  memory state 3
7,  MEM4,    LMSC  memory state 4
8,  MEM5,    LMSC  memory state 5
9,  NORM,    Increment_Norm
10, Frac_ini,    Fracture_initiation
11, Damp_1,    Damp_Strain_1
12, Damp_2,    Damp_Strain_2
13, Damp_3,    Damp_Strain_3
14, Damp_4,    Damp_Strain_4
15, ElmDEL,    ElmDEL
*User Material, constants=3
5.,5.,8.
** ----------------------------------------------------------------
**
*Material, name=Steel
*Density
 1.76e-09,
*Elastic
250000., 0.3
**
** INTERACTION PROPERTIES
**
*Surface Interaction, name=IntProp-1
*Friction
 0.05,
*Surface Behavior, pressure-overclosure=HARD
**
** BOUNDARY CONDITIONS
**
** Name: BC-Encastre-Left Type: Symmetry/Antisymmetry/Encastre
*Boundary
Set-RP-Encastre-left, ENCASTRE
** ----------------------------------------------------------------
**
** STEP: Step-1
**
*Step, name=Step-1, nlgeom=YES
*Dynamic, Explicit
, 0.000185
**
** BOUNDARY CONDITIONS
**
** Name: BC-Disp Type: Displacement/Rotation
*Boundary, amplitude=Amp-1
Set-5, 2, 2, 0.15
** Name: BC-XSYM Type: Symmetry/Antisymmetry/Encastre
*Boundary
Set-XSYM, XSYMM
**
** INTERACTIONS
**
** Interaction: Int-1
*Contact, op=NEW
*Contact Inclusions, ALL EXTERIOR
*Contact Property Assignment
 ,  , IntProp-1
**
** OUTPUT REQUESTS
**
*Restart, write, number interval=1, time marks=NO
**
** FIELD OUTPUT: F-Output-1
**
*Output, field, variable=PRESELECT
**
** FIELD OUTPUT: F-Output-3
**
*Output, field, number interval=50
*Node Output
U, V
**
** FIELD OUTPUT: F-Output-2
**
*Output, field, number interval=50
*Element Output, directions=YES
E, LE, S, SDV
**
** HISTORY OUTPUT: H-Output-3
**
*Output, history
*Node Output, nset=Set-RP-Encastre-left
RF1, RF2, RF3, RM1, RM2, RM3
*End Step
